import Sofa
import pouf

from pouf import robot
from pouf import rigid
from pouf import joint
from pouf import control
from pouf import script
from pouf import pose

import math

path = pouf.path()

class Script:

    def onBeginAnimationStep(self, dt):
        self.servo.pre_step(dt)
        return 0

    def onEndAnimationStep(self, dt):
        self.fsm.step()
        self.servo.post_step(dt)

        return 0

    def reset(self):
        self.fsm.start()
        self.servo.reset()
        return 0


# state machine definition (see control.FSM)
class StateGraph(pouf.control.FSM):

    def __init__(self, servo, root):
        pouf.control.FSM.__init__(self)

        # these 3 are needed by FSM (states, transitions, start)
        self.states = ['start', 'high', 'low' ]

        self.transitions = [ ('wait', 'start', 'high'),
                             ('wait', 'high', 'low'),
                             ('wait', 'low', 'high') ]

        self.initial = 'start'

        # additional init
        self.servo = servo
        self.root = root

        pouf.pose.setup( servo, base = 1e3 )

    # events
    def wait(self):
        return (self.root.getTime() - self.last) > 1

    # states
    def enter_start(self):
        self.servo.set('pos', pouf.pose.stand( math.pi / 14.0 ) )
        self.last = self.root.getTime()

        self.servo.set('kp', { ('lankle', 0): 1e4,
                                ('rankle', 0): 1e4 } )

    def enter_high(self):
        self.servo.set('pos', { ('lshoulder', 2): math.pi / 2,
                                ('rshoulder', 2): -math.pi / 2 } )

        self.servo.set('kd', { ('lshoulder', 2): 30,
                                ('rshoulder', 2): 30} )

        self.last = self.root.getTime()

    def enter_low(self):
        # equivalent to:
        self.servo.robot.lshoulder.pid[2].pos = math.pi / 14
        self.servo.robot.rshoulder.pid[2].pos = -math.pi / 14

        self.servo.set('pos', { ('lshoulder', 2): math.pi / 14,
                                ('rshoulder', 2): -math.pi / 14 } )

        self.last = self.root.getTime()


# an example scene demonstrating simple finite-state-machine posture
# control. 3 states: start, high, low are visited after waiting 2
# second in each state
def createScene(node):
    scene = pouf.tool.scene( node )

    # numerical solver
    num = node.createObject('SequentialSolver',
                            iterations = 100,
                            precision = 0)


    # ground
    ground = pouf.tool.ground(scene)

    # robot
    robot = pouf.robot.Humanoid('robot')
    robot.insert( scene )

    # servo
    servo = pouf.control.PID(robot)

    # state machine
    fsm = StateGraph(servo, node)
    fsm.debug = True

    # script
    script = Script()
    pouf.script.insert( node, script )

    script.servo = servo
    script.fsm = fsm

    return 0
